OpenVSP model (file version 5), 5 components.
Geometry view with OpenVSP parameter names; values to 6 digits, angles in degrees, lengths in the model's unit.
Overall bounding box: X_Min=-4.56522 X_Len=19.7952 Y_Min=-9 Y_Len=18 Z_Min=-0.533333 Z_Len=2.33548

Wing "WingGeom"
  location (X Y Z) 0 0 -0.327869, rotation 0 0 0
  symmetric about XZ
  bounding box size 4 18 0.400232
  totals: TotalSpan=18 TotalProjectedSpan=18 TotalChord=4 TotalArea=72 TotalAR=4.5 MAC=4
  root: chord 4, twist 0, NACA 4-series Camber=0 CamberLoc=0.2 ThickChord=0.1
  sections:
    n  Span  Root_Chord  Tip_Chord  Area  Sweep  Sweep_Location  Dihedral  Twist  Twist_Location  tip airfoil
    1  9     4           4          36    0      0               0         0      0               as above

TransportFuse "TransportFuse"
  location (X Y Z) -4.56522 0 0, rotation 0 0 0
  bounding box size 11.7277 1 1.03333
  Design: AftCenter=0.3 AftHeight=0.3 AftMult=3 AftWidth=0.1 Diameter=1 Length=11.7277 NoseCenter=-0.2 NoseMult=1.5
  custom script TransportFuse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

Box "Box"
  location (X Y Z) 6.52174 0 0.3, rotation 0 0 0
  bounding box size 7.77321 0.2 0.2
  Design: Height=0.2 Length=7.77321 SquareFlag=0 Width=0.2
  custom script Box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

Wing "WingGeom", child of "Box"
  location (X Y Z) 13.7295 0 0.3, rotation 0 0 0
  symmetric about XZ
  bounding box size 1.5 6 0.150087
  totals: TotalSpan=6 TotalProjectedSpan=6 TotalChord=1.5 TotalArea=9 TotalAR=4 MAC=1.5
  root: chord 1.5, twist 0, NACA 4-series Camber=0 CamberLoc=0.2 ThickChord=0.1
  sections:
    n  Span  Root_Chord  Tip_Chord  Area  Sweep  Sweep_Location  Dihedral  Twist  Twist_Location  tip airfoil
    1  3     1.5         1.5        4.5   0      0               0         0      0.25            as above

Wing "WingGeom", child of "Box"
  location (X Y Z) 13.73 0 0.3, rotation 90 0 0.0819672
  symmetric about XZ
  bounding box size 1.50214 0.150087 1.50214
  totals: TotalSpan=3 TotalProjectedSpan=3 TotalChord=1.5 TotalArea=4.5 TotalAR=2 MAC=1.5
  root: chord 1.5, twist 0, NACA 4-series Camber=0 CamberLoc=0.2 ThickChord=0.1
  sections:
    n  Span  Root_Chord  Tip_Chord  Area  Sweep  Sweep_Location  Dihedral  Twist  Twist_Location  tip airfoil
    1  1.5   1.5         1.5        2.25  0      0               0         0      0.25            as above
