OpenVSP model (file version 5), 6 components.
Geometry view with OpenVSP parameter names; values to 6 digits, angles in degrees, lengths in the model's unit.
Overall bounding box: X_Min=-4.56522 X_Len=19.7952 Y_Min=-9 Y_Len=19.018 Z_Min=-8.98548 Z_Len=17.971

Wing "WingGeom"
  location (X Y Z) 0 0 -0.327869, rotation 0 0 0
  symmetric about XZ
  bounding box size 4 18 0.400232
  totals: TotalSpan=18 TotalProjectedSpan=18 TotalChord=4 TotalArea=72 TotalAR=4.5 MAC=4
  root: chord 4, twist 0, NACA 4-series Camber=0 CamberLoc=0.2 ThickChord=0.1
  sections:
    n  Span  Root_Chord  Tip_Chord  Area  Sweep  Sweep_Location  Dihedral  Twist  Twist_Location  tip airfoil
    1  9     4           4          36    0      0               0         0      0               as above

TransportFuse "TransportFuse"
  location (X Y Z) -4.56522 0 0, rotation 0 0 0
  bounding box size 11.7277 1 1.03333
  Design: AftCenter=0.3 AftHeight=0.3 AftMult=3 AftWidth=0.1 Diameter=1 Length=11.7277 NoseCenter=-0.2 NoseMult=1.5
  custom script TransportFuse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

Box "Box"
  location (X Y Z) 6.52174 0 0.3, rotation 0 0 0
  bounding box size 7.77321 0.2 0.2
  Design: Height=0.2 Length=7.77321 SquareFlag=0 Width=0.2
  custom script Box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

Wing "WingGeom", child of "Box"
  location (X Y Z) 13.7295 0 0.3, rotation 0 0 0
  symmetric about XZ
  bounding box size 1.5 6 0.150087
  totals: TotalSpan=6 TotalProjectedSpan=6 TotalChord=1.5 TotalArea=9 TotalAR=4 MAC=1.5
  root: chord 1.5, twist 0, NACA 4-series Camber=0 CamberLoc=0.2 ThickChord=0.1
  sections:
    n  Span  Root_Chord  Tip_Chord  Area  Sweep  Sweep_Location  Dihedral  Twist  Twist_Location  tip airfoil
    1  3     1.5         1.5        4.5   0      0               0         0      0.25            as above

Wing "WingGeom", child of "Box"
  location (X Y Z) 13.73 0 0.3, rotation 90 0 0.0819672
  symmetric about XZ
  bounding box size 1.50214 0.150087 1.50214
  totals: TotalSpan=3 TotalProjectedSpan=3 TotalChord=1.5 TotalArea=4.5 TotalAR=2 MAC=1.5
  root: chord 1.5, twist 0, NACA 4-series Camber=0 CamberLoc=0.2 ThickChord=0.1
  sections:
    n  Span  Root_Chord  Tip_Chord  Area  Sweep  Sweep_Location  Dihedral  Twist  Twist_Location  tip airfoil
    1  1.5   1.5         1.5        2.25  0      0               0         0      0.25            as above

Propeller "PropGeom"
  location (X Y Z) 0 0 0, rotation 0 0 0
  bounding box size 0.993939 15.7054 17.971
  Design: Diameter=20 NumBlade=3 Beta34=20 UseBeta34Flag=1 Feather=0 Rotate=0 Precone=0 ReverseFlag=0 FoldAngle=0 PropMode=0 AF=151.538 CLi=0.538798 Chord=0.177656 Solidity=0.169649 ConstructXoC=0.5 FeatherAxisXoC=0.5 FeatherOffsetXoC=0
  cross sections:
    n  RadiusFrac  shape
    0  0.2         ellipse Ellipse_Height=0.4 Ellipse_Width=0.8
    1  0.4         NACA 16-series Chord=1.6625 IdealCl=0.7 ThickChord=0.144074
    2  1           NACA 16-series Chord=1.3 IdealCl=0.2 ThickChord=0.03
  Chord along r/R (cubic Bezier): 0.2: 0.08, 0.333333: 0.15, 0.466667: 0.2, 0.6: 0.2, 0.716667: 0.2, 0.833333: 0.2, 0.95: 0.2, 0.966667: 0.2, 0.983333: 0.2, 1: 0.13
  Twist along r/R (PCHIP): 0.2: 46.75, 0.75: 20, 1: 13
  Thick along r/R (cubic Bezier): 0.2: 0.5, 0.233333: 0.3, 0.266667: 0.225, 0.3: 0.2, 0.4: 0.125, 0.5: 0.115, 0.6: 0.1, 0.733333: 0.075, 0.866667: 0.055, 1: 0.03
  CLI along r/R (cubic Bezier): 0.2: 0, 0.266667: 0.7, 0.333333: 0.7, 0.4: 0.7, 0.466667: 0.7, 0.533333: 0.7, 0.6: 0.7, 0.733333: 0.7, 0.866667: 0.7, 1: 0.2
